// SBML level 3 version 1

model Jenkinson2011_EGF_MAPK()
  // This is a model described in the article:
  // Thermodynamically Consistent Model Calibration in Chemical Kinetics.
  // Garrett Jenkinson and John Goutsias, BMC Systems Biology 2011 May 6;5(1):64.; PMID: 21548948 .
  // ABSTRACT:
  // BACKGROUND:
  // The dynamics of biochemical reaction systems are constrained by the fundamental laws of thermodynamics, which impose well-defined relationships among the reaction rate constants characterizing these systems. Constructing biochemical reaction systems from experimental observations often leads to parameter values that do not satisfy the necessary thermodynamic constraints. This can result in models that are not physically realizable and may lead to inaccurate, or even erroneous, descriptions of cellular function.
  // RESULTS:
  // We introduce a thermodynamically consistent model calibration (TCMC) method that can be effectively used to provide thermodynamically feasible values for the parameters of an open biochemical reaction system. The proposed method formulates the model calibration problem as a constrained optimization problem that takes thermodynamic constraints (and, if desired, additional non-thermodynamic constraints) into account. By calculating thermodynamically feasible values for the kinetic parameters of a well-known model of the EGF/ERK signaling cascade, we demonstrate the qualitative and quantitative significance of imposing thermodynamic constraints on these parameters and the effectiveness of our method for accomplishing this important task. MATLAB software, using the Systems Biology Toolbox 2.1, can be accessed from www.cis.jhu.edu/~goutsias/CSS lab/software.html. An SBML file containing the thermodynamically feasible EGF/ERK signaling cascade model can be found in the BioModels database.
  // CONCLUSIONS:
  // TCMC is a simple and flexible method for obtaining physically plausible values for the kinetic parameters of open biochemical reaction systems. It can be effectively used to recalculate a thermodynamically consistent set of parameter values for existing thermodynamically infeasible biochemical reaction models of cellular function as well as to estimate thermodynamically feasible values for the parameters of new models. Furthermore, TCMC can provide dimensionality reduction, better estimation performance, and lower computational complexity, and can help to alleviate the problem of data overfitting.
  // This model is a thermodynamically feasible version of a previous model in the BioModels database, BIOMD0000000019 , described in Computational modeling of the dynamics of the MAP kinase cascade activated by surface and internalized EGF receptors. Schoeberl et al (2002), PMID: 11923843 .
  // The only difference between the present model and the model listed under BIOMD0000000019 are the values of the parameters.
  // This model originates from BioModels Database: A Database of Annotated Published Models (http://www.ebi.ac.uk/biomodels/). It is copyright (c) 2005-2012 The BioModels.net Team.
  // For more information see the terms of use .
  // To cite BioModels Database, please use: Li C, Donizelli M, Rodriguez N, Dharuri H, Endler L, Chelliah V, Li L, He E, Henry A, Stefan MI, Snoep JL, Hucka M, Le Novère N, Laibe C (2010) BioModels Database: An enhanced, curated and annotated resource for published quantitative kinetic models. BMC Syst Biol., 4:92.
  // This model was automatically converted from BIOMD0000000399 to SBML L3V1 by using libSBML.
  // There were the following warnings during the conversion process:
  // In situations where a mathematical expression refers to a compartment, species or parameter, it is necessary to know the units of the object to establish unit consistency. In models where the units of an object have not been declared, libSBML does not yet have the functionality to accurately verify the consistency of the units in mathematical expressions referring to that object. The units of the <parameter> 'C' cannot be fully checked. Unit consistency reported as either no errors or further unit errors related to this object may not be accurate.
  // If the attribute 'units' on a given Parameter object has not been set, then the unit of measurement associated with that parameter's value is undefined. Reference: L3V1 Section 4.7.3 The <parameter> with id 'C' does not have a 'units' attribute.
  // In situations where a mathematical expression contains literal numbers or parameters whose units have not been declared, it is not possible to verify accurately the consistency of the units in the expression. The units of the <assignmentRule> <math> expression 'RT / (kr1 / (k1 * x1) + 1)' cannot be fully checked. Unit consistency reported as either no errors or further unit errors related to this object may not be accurate.
  // In situations where a mathematical expression contains literal numbers or parameters whose units have not been declared, it is not possible to verify accurately the consistency of the units in the expression. The units of the <assignmentRule> <math> expression 'piecewise(1.55, lt(C, 3100), 0.2, gt(C, 100000), C * -1.350000e-05 + 1.55)' cannot be fully checked. Unit consistency reported as either no errors or further unit errors related to this object may not be accurate.
  // As a principle of best modeling practice, the units of a <parameter> should be declared rather than be left undefined. Doing so improves the ability of software to check the consistency of units and helps make it easier to detect potential errors in models. The <parameter> with the id 'C' does not have a 'units' attribute.
  // biomodels.db:MODEL1105060003
  // biomodels.db:BIOMD0000000399
  // isDescribedBy pubmed:21548948
  // isDerivedFrom biomodels.db:BIOMD0000000019
  // occursIn taxonomy:9606
  // hasVersion GO:0000165 GO:0007265
  // model units - substance: substance, time: time, volume: volume, area: area, length: metre, extent: substance

  // Compartments:
  compartment extracellular_volume = 1 volume;  // GO:0005615
  compartment cytoplasm = 1 volume;  // GO:0005737
  compartment endosomal_volume = 4.3e-6 volume;  // GO:0005768

  // Species:
  // 4962 molecules correspond roughly to 50 ng/ml, concentration used throughout the article (MW~6045 Da, vol=1e-12l)
  // Similarly, 496.2 molecules correspond roughly to 5 ng/ml, 49.62 molecules correspond roughly to .5 ng/ml, 12.405 molecules correspond roughly to 0.125 ng/ml, 6.2025 molecules correspond roughly to 0.0625 ng/ml
  substanceOnly species $EGF in extracellular_volume = 4962;  // isVersionOf uniprot:P01133
  substanceOnly species EGFR in extracellular_volume = 50000;  // isVersionOf uniprot:P00533
  substanceOnly species EGF_EGFR in cytoplasm = 0; EGF_EGFR is "EGF-EGFR";  // isVersionOf reactome:REACT_9893; hasPart uniprot:P01133 uniprot:P00533
  substanceOnly species x4 in cytoplasm = 0; x4 is "EGF-EGFR^2";  // isVersionOf reactome:REACT_9820; hasPart uniprot:P01133 uniprot:P00533
  substanceOnly species x5 in cytoplasm = 0; x5 is "EGF-EGFR*^2";  // isVersionOf kegg.compound:C00562; hasPart uniprot:P01133 uniprot:P00533
  substanceOnly species EGFRi in cytoplasm = 0;  // isVersionOf uniprot:P00533
  substanceOnly species EGF_EGFR_2_GAP_Grb2_Prot in cytoplasm = 0; EGF_EGFR_2_GAP_Grb2_Prot is "EGF-EGFR*^2-GAP-Grb2-Prot";  // hasPart uniprot:P01133 uniprot:P00533 uniprot:P62993 uniprot:P20936
  substanceOnly species x8 in cytoplasm = 0; x8 is "EGF-EGFRi*^2";  // hasPart uniprot:P00533 uniprot:P01133
  substanceOnly species Proti in cytoplasm = 0;  // isVersionOf GO:0030119
  substanceOnly species EGF_EGFRi in cytoplasm = 0; EGF_EGFRi is "EGF-EGFRi";  // hasPart uniprot:P00533 uniprot:P01133
  substanceOnly species x11 in cytoplasm = 0; x11 is "EGF-EGFRi^2";  // hasPart uniprot:P01133 uniprot:P00533
  substanceOnly species Prot in cytoplasm = 81000;  // isVersionOf GO:0030119
  substanceOnly species EGFideg in endosomal_volume = 0;
  substanceOnly species GAP in cytoplasm = 12000;  // isDescribedBy omim:139150; isVersionOf uniprot:P20936; isVersionOf interpro:IPR001936
  substanceOnly species EGF_EGFR_2_GAP in endosomal_volume = 0; EGF_EGFR_2_GAP is "EGF-EGFR*^2-GAP";  // hasPart uniprot:P01133 uniprot:P00533 uniprot:P20936
  substanceOnly species EGFi in cytoplasm = 0;  // isVersionOf uniprot:P01133
  substanceOnly species EGF_EGFRi_2_GAP in cytoplasm = 0; EGF_EGFRi_2_GAP is "EGF-EGFRi*^2-GAP";  // hasPart uniprot:P20936 uniprot:P00533 uniprot:P01133
  substanceOnly species EGF_EGFRi_2_GAP_Grb2 in cytoplasm = 0; EGF_EGFRi_2_GAP_Grb2 is "EGF-EGFRi*^2-GAP-Grb2";  // hasPart uniprot:P62993 uniprot:P20936 uniprot:P00533 uniprot:P01133
  substanceOnly species EGF_EGFRi_2_GAP_Grb2_Sos in cytoplasm = 0; EGF_EGFRi_2_GAP_Grb2_Sos is "EGF-EGFRi*^2-GAP-Grb2-Sos";  // hasPart uniprot:Q07889 uniprot:P62993 uniprot:P20936 uniprot:P00533
  substanceOnly species EGF_EGFRi_2_GAP_Grb2_Sos_Ras_GDP in cytoplasm = 0; EGF_EGFRi_2_GAP_Grb2_Sos_Ras_GDP is "EGF-EGFRi*^2-GAP-Grb2-Sos-Ras-GDP";  // hasPart CHEBI:17552 uniprot:P01112 uniprot:Q07889 uniprot:P62993
  substanceOnly species EGF_EGFRi_2_GAP_Grb2_Sos_Ras_GTP in cytoplasm = 0; EGF_EGFRi_2_GAP_Grb2_Sos_Ras_GTP is "EGF-EGFRi*^2-GAP-Grb2-Sos-Ras-GTP";  // hasPart CHEBI:15996 uniprot:P01112 uniprot:Q07889 uniprot:P62993
  substanceOnly species Grb2 in cytoplasm = 11000;  // isDescribedBy omim:108355; isVersionOf uniprot:P62993
  substanceOnly species EGF_EGFR_2_GAP_Grb2 in cytoplasm = 0; EGF_EGFR_2_GAP_Grb2 is "EGF-EGFR*^2-GAP-Grb2";  // hasPart uniprot:P62993 uniprot:P20936 uniprot:P00533 uniprot:P01133
  substanceOnly species Sos in cytoplasm = 26300;  // isDescribedBy omim:182530; isVersionOf uniprot:Q07889
  substanceOnly species EGF_EGFR_2_GAP_Grb2_Sos in cytoplasm = 0; EGF_EGFR_2_GAP_Grb2_Sos is "EGF-EGFR*^2-GAP-Grb2-Sos";  // hasPart uniprot:Q07889 uniprot:P62993 uniprot:P20936 uniprot:P00533
  substanceOnly species Ras_GDP in cytoplasm = 72000; Ras_GDP is "Ras-GDP";  // hasPart CHEBI:17552 uniprot:P01112
  substanceOnly species EGF_EGFR_2_GAP_Grb2_Sos_Ras_GDP in cytoplasm = 0; EGF_EGFR_2_GAP_Grb2_Sos_Ras_GDP is "EGF-EGFR*^2-GAP-Grb2-Sos-Ras-GDP";  // hasPart CHEBI:17552 uniprot:P01112 uniprot:Q07889 uniprot:P62993
  substanceOnly species x28 in cytoplasm = 0; x28 is "Ras-GTP";  // hasPart CHEBI:15996 uniprot:P01112
  substanceOnly species EGF_EGFR_2_GAP_Grb2_Sos_Ras_GTP in cytoplasm = 0; EGF_EGFR_2_GAP_Grb2_Sos_Ras_GTP is "EGF-EGFR*^2-GAP-Grb2-Sos-Ras-GTP";  // hasPart CHEBI:15996 uniprot:P01112 uniprot:Q07889 uniprot:P62993
  substanceOnly species Grb2_Sos in cytoplasm = 40000; Grb2_Sos is "Grb2-Sos";  // hasPart uniprot:Q07889 uniprot:P62993
  substanceOnly species x31 in cytoplasm = 101000; x31 is "Shc";  // isDescribedBy omim:605217; isVersionOf uniprot:P98077
  substanceOnly species x32 in cytoplasm = 0; x32 is "EGF-EGFR*^2-GAP-Shc";  // hasPart uniprot:P98077 uniprot:P20936 uniprot:P00533 uniprot:P01133
  substanceOnly species x33 in cytoplasm = 0; x33 is "EGF-EGFR*^2-GAP-Shc*";  // hasPart uniprot:P98077 uniprot:P20936 uniprot:P00533 uniprot:P01133
  substanceOnly species EGF_EGFR_2_GAP_Shc_Grb2 in cytoplasm = 0; EGF_EGFR_2_GAP_Shc_Grb2 is "EGF-EGFR*^2-GAP-Shc*-Grb2";  // hasPart uniprot:P62993 uniprot:P98077 uniprot:P20936 uniprot:P00533
  substanceOnly species EGF_EGFR_2_GAP_Shc_Grb2_Sos in cytoplasm = 0; EGF_EGFR_2_GAP_Shc_Grb2_Sos is "EGF-EGFR*^2-GAP-Shc*-Grb2-Sos";  // hasPart uniprot:Q07889 uniprot:P62993 uniprot:P98077 uniprot:P20936
  substanceOnly species x36 in cytoplasm = 0; x36 is "EGF-EGFR*^2-GAP-Shc*-Grb2-Sos-Ras-GDP";  // hasPart CHEBI:17552 uniprot:P01112 uniprot:Q07889 uniprot:P62993
  substanceOnly species x37 in cytoplasm = 0; x37 is "EGF-EGFR*^2-GAP-Shc*-Grb2-Sos-Ras-GTP";  // hasPart CHEBI:15996 uniprot:P01112 uniprot:Q07889 uniprot:P62993
  substanceOnly species Shc_Grb2_Sos in cytoplasm = 0; Shc_Grb2_Sos is "Shc*-Grb2-Sos";  // hasPart uniprot:Q07889 uniprot:P62993 uniprot:P98077
  substanceOnly species Shc_Grb2 in cytoplasm = 0; Shc_Grb2 is "Shc*-Grb2";  // hasPart uniprot:P62993 uniprot:P98077
  substanceOnly species x40 in cytoplasm = 0; x40 is "Shc*";  // hasPart uniprot:P98077
  substanceOnly species x41 in cytoplasm = 40000; x41 is "Raf";  // hasPart uniprot:P04049
  substanceOnly species Raf_Ras_GTP in cytoplasm = 0; Raf_Ras_GTP is "Raf-Ras-GTP";  // hasPart CHEBI:15996 uniprot:P01112 uniprot:P04049
  substanceOnly species x43 in cytoplasm = 0; x43 is "Ras-GTP*";  // hasPart CHEBI:15996 uniprot:P01112
  substanceOnly species Phosphotase1 in cytoplasm = 40000;  // isVersionOf MI:0501
  substanceOnly species x45 in cytoplasm = 0; x45 is "Raf*";  // isVersionOf uniprot:P04049
  substanceOnly species Raf_P_ase in cytoplasm = 0; Raf_P_ase is "Raf*-P'ase";  // hasPart uniprot:P04049
  substanceOnly species MEK in cytoplasm = 22000000;  // isDescribedBy omim:176872; isVersionOf uniprot:Q02750 uniprot:A4QPA9
  substanceOnly species MEK_Raf in cytoplasm = 0; MEK_Raf is "MEK-Raf*";  // hasPart uniprot:P04049 uniprot:Q02750
  substanceOnly species MEK_P in cytoplasm = 0; MEK_P is "MEK-P";  // isDescribedBy omim:176872; isVersionOf uniprot:Q02750 uniprot:A4QPA9 kegg.compound:C00562
  substanceOnly species MEK_P_Raf in cytoplasm = 0; MEK_P_Raf is "MEK-P-Raf*";  // isVersionOf kegg.compound:C00562; hasPart uniprot:P04049 uniprot:Q02750
  substanceOnly species x51 in cytoplasm = 0; x51 is "MEK-PP";  // isVersionOf uniprot:Q02750 kegg.compound:C00562
  substanceOnly species MEK_PP_P_ase2 in cytoplasm = 0; MEK_PP_P_ase2 is "MEK-PP-P'ase2";  // isVersionOf kegg.compound:C00562; hasPart uniprot:Q9BZL4 uniprot:Q02750
  substanceOnly species Phosphatase2 in cytoplasm = 40000;  // isVersionOf MI:0501
  substanceOnly species MEK_P_P_ase2 in cytoplasm = 0; MEK_P_P_ase2 is "MEK-P-P'ase2";  // isVersionOf kegg.compound:C00562; hasPart uniprot:Q02750 uniprot:Q9BZL4
  substanceOnly species ERK in cytoplasm = 21000000;  // isDescribedBy omim:176948; isVersionOf uniprot:P28482
  substanceOnly species ERK_MEK_PP in cytoplasm = 0; ERK_MEK_PP is "ERK-MEK-PP";  // isVersionOf kegg.compound:C00562; hasPart uniprot:P28482 uniprot:Q02750
  substanceOnly species ERK_P in cytoplasm = 0; ERK_P is "ERK-P";  // isVersionOf uniprot:P28482 kegg.compound:C00562
  substanceOnly species ERK_P_MEK_PP in cytoplasm = 0; ERK_P_MEK_PP is "ERK-P-MEK-PP";  // isVersionOf kegg.compound:C00562; hasPart uniprot:P28482 uniprot:Q02750
  substanceOnly species x59 in cytoplasm = 0; x59 is "ERK-PP";  // isVersionOf uniprot:P28482 kegg.compound:C00562
  substanceOnly species Phosphotase3 in cytoplasm = 10000000;  // isVersionOf MI:0501
  substanceOnly species ERK_PP_P_ase3 in cytoplasm = 0; ERK_PP_P_ase3 is "ERK-PP-P'ase3";  // isVersionOf kegg.compound:C00562; hasPart uniprot:P28482 MI:0501
  substanceOnly species ERK_P_P_ase3 in cytoplasm = 0; ERK_P_P_ase3 is "ERK-P-P'ase3";  // isVersionOf kegg.compound:C00562; hasPart uniprot:P28482 MI:0501
  substanceOnly species x63 in cytoplasm = 0; x63 is "EGF-EGFRi*^2-GAP-Shc";  // hasPart uniprot:P98077 uniprot:P20936 uniprot:P01133 uniprot:P00533
  substanceOnly species x64 in cytoplasm = 0; x64 is "EGF-EGFRi*^2-GAP-Shc*";  // hasPart uniprot:P98077 uniprot:P20936 uniprot:P00533 uniprot:P01133
  substanceOnly species EGF_EGFRi_2_GAP_Shc_Grb2 in cytoplasm = 0; EGF_EGFRi_2_GAP_Shc_Grb2 is "EGF-EGFRi*^2-GAP-Shc*-Grb2";  // hasPart uniprot:P62993 uniprot:P98077 uniprot:P20936 uniprot:P01133
  substanceOnly species EGF_EGFRi_2_GAP_Shc_Grb2_Sos in cytoplasm = 0; EGF_EGFRi_2_GAP_Shc_Grb2_Sos is "EGF-EGFRi*^2-GAP-Shc*-Grb2-Sos";  // hasPart uniprot:Q07889 uniprot:P62993 uniprot:P98077 uniprot:P20936
  substanceOnly species x67 in cytoplasm = 0; x67 is "EGF-EGFRi*^2-GAP-Shc*-Grb2-Sos-Ras-GDP";  // hasPart CHEBI:17552 uniprot:P01112 uniprot:P62993 uniprot:Q07889
  substanceOnly species x68 in cytoplasm = 0; x68 is "EGF-EGFRi*^2-GAP-Shc*-Grb2-Sos-Ras-GTP";  // hasPart CHEBI:15996 uniprot:P01112 uniprot:Q07889 uniprot:P62993
  substanceOnly species x69 in cytoplasm = 0; x69 is "Rasi-GTP";  // hasPart CHEBI:15996 uniprot:P01112
  substanceOnly species Rafi_Rasi_GTP in cytoplasm = 0; Rafi_Rasi_GTP is "Rafi-Rasi-GTP";  // hasPart CHEBI:15996 uniprot:P01112 uniprot:P04049
  substanceOnly species x71 in cytoplasm = 0; x71 is "Rasi-GTP*";  // hasPart CHEBI:15996 uniprot:P01112
  substanceOnly species Rafi in cytoplasm = 0; Rafi is "Rafi*";  // isVersionOf uniprot:P04049
  substanceOnly species Rafi_P_ase in cytoplasm = 0; Rafi_P_ase is "Rafi*-P'ase";  // hasPart uniprot:P04049 MI:0501
  substanceOnly species MEKi_Rafi in cytoplasm = 0; MEKi_Rafi is "MEKi-Rafi*";  // hasPart uniprot:P04049 uniprot:Q02750
  substanceOnly species MEKi_P in cytoplasm = 0; MEKi_P is "MEKi-P";  // isVersionOf uniprot:Q02750 kegg.compound:C00562
  substanceOnly species MEKi_P_Rafi in cytoplasm = 0; MEKi_P_Rafi is "MEKi-P-Rafi*";  // isVersionOf kegg.compound:C00562; hasPart uniprot:P04049 uniprot:Q02750
  substanceOnly species MEKi_PP in cytoplasm = 0; MEKi_PP is "MEKi-PP";  // isVersionOf uniprot:Q02750 kegg.compound:C00562
  substanceOnly species MEKi_PP_P_ase2i in cytoplasm = 0; MEKi_PP_P_ase2i is "MEKi-PP-P'ase2i";  // isVersionOf kegg.compound:C00562; hasPart uniprot:Q02750 MI:0501
  substanceOnly species MEKi_P_P_ase2i in cytoplasm = 0; MEKi_P_P_ase2i is "MEKi-P-P'ase2i";  // isVersionOf kegg.compound:C00562; hasPart uniprot:Q02750 MI:0501
  substanceOnly species ERKi_MEKi_PP in cytoplasm = 0; ERKi_MEKi_PP is "ERKi-MEKi-PP";  // isVersionOf kegg.compound:C00562; hasPart uniprot:Q02750 uniprot:P28482
  substanceOnly species ERKi_P in cytoplasm = 0; ERKi_P is "ERKi-P";  // isVersionOf uniprot:P28482 kegg.compound:C00562
  substanceOnly species ERKi_P_MEKi_PP in cytoplasm = 0; ERKi_P_MEKi_PP is "ERKi-P-MEKi-PP";  // isVersionOf kegg.compound:C00562; hasPart uniprot:P28482 uniprot:Q02750
  substanceOnly species ERKi_PP in cytoplasm = 0; ERKi_PP is "ERKi-PP";  // isVersionOf uniprot:P28482 kegg.compound:C00562
  substanceOnly species ERKi_PP_P_ase3i in cytoplasm = 0; ERKi_PP_P_ase3i is "ERKi-PP-P'ase3i";  // isVersionOf kegg.compound:C00562; hasPart uniprot:P28482 MI:0501
  substanceOnly species ERKi_P_P_ase3i in cytoplasm = 0; ERKi_P_P_ase3i is "ERKi-P-P'ase3i";  // isVersionOf kegg.compound:C00562; hasPart uniprot:P28482 MI:0501
  substanceOnly species EGFRideg in cytoplasm = 0;
  substanceOnly species EGF_EGFRi_2deg in cytoplasm = 0; EGF_EGFRi_2deg is "EGF-EGFRi*^2deg";
  substanceOnly species EGF_EGFR_2_GAP_Grb2_Sos_Prot in cytoplasm = 0; EGF_EGFR_2_GAP_Grb2_Sos_Prot is "EGF-EGFR*^2-GAP-Grb2-Sos-Prot";  // hasPart uniprot:P01133 uniprot:P00533 uniprot:P62993 uniprot:P20936
  substanceOnly species x89 in cytoplasm = 0; x89 is "EGF-EGFR*^2-GAP-Grb2-Sos-Ras-GDP-Prot";  // hasPart CHEBI:17552 uniprot:P01133 uniprot:P00533 uniprot:P20936
  substanceOnly species x90 in cytoplasm = 0; x90 is "EGF-EGFR*^2-GAP-Grb2-Sos-Ras-GTP-Prot";  // hasPart CHEBI:15996 uniprot:P01133 uniprot:P00533 uniprot:P20936
  substanceOnly species EGF_EGFR_2_GAP_Shc_Grb2_Prot in cytoplasm = 0; EGF_EGFR_2_GAP_Shc_Grb2_Prot is "EGF-EGFR*^2-GAP-Shc*-Grb2-Prot";  // hasPart uniprot:P01133 uniprot:P00533 uniprot:P20936 uniprot:P98077
  substanceOnly species EGF_EGFR_2_GAP_Shc_Grb2_Sos_Prot in cytoplasm = 0; EGF_EGFR_2_GAP_Shc_Grb2_Sos_Prot is "EGF-EGFR*^2-GAP-Shc*-Grb2-Sos-Prot";  // hasPart uniprot:P01133 uniprot:P00533 uniprot:P20936 uniprot:P98077
  substanceOnly species x93 in cytoplasm = 0; x93 is "EGF-EGFR*^2-GAP-Shc*-Grb2-Sos-Ras-GDP-Prot";  // hasPart CHEBI:17552 uniprot:P01133 uniprot:P00533 uniprot:P20936
  substanceOnly species x94 in cytoplasm = 0; x94 is "EGF-EGFR*^2-GAP-Shc*-Grb2-Sos-Ras-GTP-Prot";  // hasPart CHEBI:15996 uniprot:P01133 uniprot:P00533 uniprot:P20936
  substanceOnly species $Raf_act in cytoplasm; Raf_act is "t_Raf*";
  substanceOnly species $Ras_GTP in cytoplasm; Ras_GTP is "t_Ras_GTP";
  substanceOnly species $MEK_PP in cytoplasm; MEK_PP is "t_MEK_PP";
  substanceOnly species $ERK_PP in cytoplasm; ERK_PP is "t_ERK_PP";
  substanceOnly species $SHC_P_t in cytoplasm; SHC_P_t is "t_SHC_P_t";
  substanceOnly species $EGF_EGFR_act in cytoplasm; EGF_EGFR_act is "t_EGF_EGFR*";

  // Parameters:
  k1 = 0.002372521 pipmin;
  kr1 = 0.1146248 pmin;
  kr2 = 0.5100538 pmin;
  k2 = 0.000480156 pipmin;
  k3 = 31.71871 pmin;
  kr3 = 2.220991 pmin;
  k4 = 3.047285e-5 pipmin;
  kr4 = 0.1230832 pmin;
  k5 has pmin;
  k6 = 0.0004123214 pmin;
  kr6 = 0.294324 pmin;
  k7 = 0.003011324 pmin;
  k8 = 0.0005174108 pipmin;
  kr8 = 0.9058936 pmin;
  k10 = 3803.728 pipmin;
  kr10 = 171.6947 pmin;
  kr11 = 0.5100538 pmin;
  k11 = 0.000480156 pipmin;
  kr12 = 2.220991 pmin;
  k12 = 31.71871 pmin;
  k13 = 0.4545611 ipmin;
  k14 = 6.370566e-7 pipmin;
  kr14 = 196.6479 pmin;
  k15 = 4.646878e4 pmin;
  kr16 = 0.4509308 pmin;
  k16 = 0.0004021305 pipmin;
  kr17 = 2.524092 pmin;
  k17 = 0.0003099213 pipmin;
  kr18 = 11.1361 pmin;
  k18 = 0.004463938 pipmin;
  kr19 = 5.84737e-6 pipmin;
  k19 = 349.772 pmin;
  kr20 = 12.816 pmin;
  k20 = 5.17656e-5 pipmin;
  k21 = 0.4722901 pmin;
  kr21 = 1.714441e-5 pipmin;
  k22 = 0.0001445554 pipmin;
  kr22 = 0.6220457 pmin;
  k23 = 420.3359 pmin;
  kr23 = 17.39321 pmin;
  k24 = 0.007178843 pipmin;
  kr24 = 563.2135 pmin;
  kr25 = 1.218132 pmin;
  k25 = 0.0006871213 pipmin;
  k28 = 9.826084e-6 pipmin;
  kr28 = 0.9683624 pmin;
  k29 = 931.1092 pmin;
  kr29 = 0.0001096614 pipmin;
  kr32 = 5.54527e-5 pipmin;
  k32 = 14.19908 pmin;
  k33 = 10.96212 pmin;
  kr33 = 1.788597e-5 pipmin;
  k34 = 0.2467995 pmin;
  kr34 = 0.0001283286 pipmin;
  k35 = 1.836058 pmin;
  kr35 = 0.0003866434 pipmin;
  Vm36 = 615.0325 ipmin;
  Km36 = 7.719778e14 substance;
  k37 = 29.34687 pmin;
  kr37 = 5.477036e-6 pipmin;
  k40 = 7.409959e-5 pipmin;
  kr40 = 2.748877 pmin;
  kr41 = 44.60169 pmin;
  k41 = 0.001522817 pipmin;
  k42 = 0.009688174 pipmin;
  kr42 = 1.870396 pmin;
  k43 = 51.60945 pmin;
  kr44 = 0.5985189 pmin;
  k44 = 0.001406622 pipmin;
  k45 = 6340.081 pmin;
  k47 = 1632.425 pmin;
  kr48 = 1489.015 pmin;
  k48 = 0.0006874119 pipmin;
  k49 = 10.73099 pmin;
  kr50 = 9.954943 pmin;
  k50 = 0.0005464454 pipmin;
  k52 = 0.003826571 pipmin;
  kr52 = 19.85279 pmin;
  k53 = 6.218184e4 pmin;
  k55 = 1120.398 pmin;
  kr56 = 1.229629 pmin;
  k56 = 0.004700229 pipmin;
  k57 = 19.75184 pmin;
  kr58 = 0.1138168 pmin;
  k58 = 0.0001714511 pipmin;
  k59 = 6.409354 pmin;
  k60 = 0.08693199 pmin;
  k61 = 0.006499143 pmin;
  var C; C is "C_internalization";
  RT = 50000 substance; RT is "total_Receptors";

  // Assignment rules:
  Ras_GTP := Raf_Ras_GTP + x28 + Rafi_Rasi_GTP + x69;
  MEK_PP := x51 + MEKi_PP;
  ERK_PP := x59 + ERKi_PP;
  Raf_act := x45 + Raf_P_ase + MEK_Raf + MEK_P_Raf + Rafi + Rafi_P_ase + MEKi_Rafi + MEKi_P_Rafi;
  SHC_P_t := x33 + EGF_EGFR_2_GAP_Shc_Grb2 + EGF_EGFR_2_GAP_Shc_Grb2_Sos + x36 + x37 + Shc_Grb2_Sos + Shc_Grb2 + x40 + EGF_EGFR_2_GAP_Shc_Grb2_Prot + EGF_EGFR_2_GAP_Shc_Grb2_Sos_Prot + x93 + x94 + x64 + EGF_EGFRi_2_GAP_Shc_Grb2 + EGF_EGFRi_2_GAP_Shc_Grb2_Sos + x67 + x68;
  EGF_EGFR_act := x5 + EGF_EGFR_2_GAP_Grb2_Prot + EGF_EGFR_2_GAP + EGF_EGFR_2_GAP_Grb2 + EGF_EGFR_2_GAP_Grb2_Sos + EGF_EGFR_2_GAP_Grb2_Sos_Ras_GDP + EGF_EGFR_2_GAP_Grb2_Sos_Ras_GTP + x32 + x33 + EGF_EGFR_2_GAP_Shc_Grb2 + EGF_EGFR_2_GAP_Shc_Grb2_Sos + x36 + x37 + EGF_EGFR_2_GAP_Grb2_Sos_Prot + x89 + x90 + EGF_EGFR_2_GAP_Shc_Grb2_Prot + EGF_EGFR_2_GAP_Shc_Grb2_Sos_Prot + x93 + x94 + x8 + x11 + EGF_EGFRi_2_GAP + EGF_EGFRi_2_GAP_Grb2 + EGF_EGFRi_2_GAP_Grb2_Sos + EGF_EGFRi_2_GAP_Grb2_Sos_Ras_GDP + EGF_EGFRi_2_GAP_Grb2_Sos_Ras_GTP + x63 + x64 + EGF_EGFRi_2_GAP_Shc_Grb2 + EGF_EGFRi_2_GAP_Shc_Grb2_Sos + x67 + x68;
  C := RT/(kr1/(k1*EGF) + 1);
  k5 := piecewise(1.55, C < 3100, 0.2, C > 100000, C*(-1.35e-5) + 1.55);

  // Reactions:
  v1: $EGF + EGFR -> EGF_EGFR; k1*EGF*EGFR - kr1*EGF_EGFR;  // isVersionOf GO:0006461
  v2: 2 EGF_EGFR -> x4; k2*EGF_EGFR*EGF_EGFR - kr2*x4;  // isVersionOf GO:0042803
  v3: x4 -> x5; k3*x4 - kr3*x5;  // isVersionOf MOD:00000
  v4: EGF_EGFR_2_GAP_Grb2 + Prot -> EGF_EGFR_2_GAP_Grb2_Prot; k4*EGF_EGFR_2_GAP_Grb2*Prot - kr4*EGF_EGFR_2_GAP_Grb2_Prot;  // isVersionOf GO:0006461
  v5: EGF_EGFR_2_GAP_Grb2_Prot -> EGF_EGFRi_2_GAP_Grb2 + Proti; k5*EGF_EGFR_2_GAP_Grb2_Prot;  // isVersionOf GO:0043241
  v6: EGFR -> EGFRi; k6*EGFR - kr6*EGFRi;  // isVersionOf MOD:00000
  v7: x5 => x8; k7*x5;  // isVersionOf MOD:00000
  v8: x5 + GAP -> EGF_EGFR_2_GAP; k8*x5*GAP - kr8*EGF_EGFR_2_GAP;  // isVersionOf GO:0006461
  v9: EGF_EGFR_2_GAP_Grb2 => EGF_EGFRi_2_GAP_Grb2; k7*EGF_EGFR_2_GAP_Grb2;  // isVersionOf MOD:00000
  v10: EGFRi + EGFi -> EGF_EGFRi; k10*EGFRi*EGFi - kr10*EGF_EGFRi;  // isVersionOf GO:0006461
  v11: 2 EGF_EGFRi -> x11; k2*EGF_EGFRi*EGF_EGFRi - kr2*x11;  // isVersionOf GO:0042803
  v12: x11 -> x8; k3*x11 - kr3*x8;  // isVersionOf MOD:00000
  v13: => EGFR; k13;  // isVersionOf GO:0032800
  v14: x8 + GAP -> EGF_EGFRi_2_GAP; k14*x8*GAP - kr14*EGF_EGFRi_2_GAP;  // isVersionOf GO:0006461
  v15: Proti => Prot; k15*Proti;  // isVersionOf MOD:00000
  v16: Grb2 + EGF_EGFR_2_GAP -> EGF_EGFR_2_GAP_Grb2; k16*Grb2*EGF_EGFR_2_GAP - kr16*EGF_EGFR_2_GAP_Grb2;  // isVersionOf GO:0006461
  v17: Sos + EGF_EGFR_2_GAP_Grb2 -> EGF_EGFR_2_GAP_Grb2_Sos; k17*Sos*EGF_EGFR_2_GAP_Grb2 - kr17*EGF_EGFR_2_GAP_Grb2_Sos;  // isVersionOf GO:0006461
  v18: Ras_GDP + EGF_EGFR_2_GAP_Grb2_Sos -> EGF_EGFR_2_GAP_Grb2_Sos_Ras_GDP; k18*Ras_GDP*EGF_EGFR_2_GAP_Grb2_Sos - kr18*EGF_EGFR_2_GAP_Grb2_Sos_Ras_GDP;  // isVersionOf GO:0006461
  v19: EGF_EGFR_2_GAP_Grb2_Sos_Ras_GDP -> x28 + EGF_EGFR_2_GAP_Grb2_Sos; k19*EGF_EGFR_2_GAP_Grb2_Sos_Ras_GDP - kr19*x28*EGF_EGFR_2_GAP_Grb2_Sos;  // isVersionOf GO:0043241
  v20: EGF_EGFR_2_GAP_Grb2_Sos + x43 -> EGF_EGFR_2_GAP_Grb2_Sos_Ras_GTP; k20*EGF_EGFR_2_GAP_Grb2_Sos*x43 - kr20*EGF_EGFR_2_GAP_Grb2_Sos_Ras_GTP;  // isVersionOf GO:0006461
  v21: EGF_EGFR_2_GAP_Grb2_Sos_Ras_GTP -> EGF_EGFR_2_GAP_Grb2_Sos + Ras_GDP; k21*EGF_EGFR_2_GAP_Grb2_Sos_Ras_GTP - kr21*EGF_EGFR_2_GAP_Grb2_Sos*Ras_GDP;  // isVersionOf GO:0043241
  v22: x31 + EGF_EGFR_2_GAP -> x32; k22*x31*EGF_EGFR_2_GAP - kr22*x32;  // isVersionOf GO:0006461
  v23: x32 -> x33; k23*x32 - kr23*x33;  // isVersionOf GO:0006461
  v24: Grb2 + x33 -> EGF_EGFR_2_GAP_Shc_Grb2; k24*Grb2*x33 - kr24*EGF_EGFR_2_GAP_Shc_Grb2;  // isVersionOf GO:0006461
  v25: Sos + EGF_EGFR_2_GAP_Shc_Grb2 -> EGF_EGFR_2_GAP_Shc_Grb2_Sos; k25*Sos*EGF_EGFR_2_GAP_Shc_Grb2 - kr25*EGF_EGFR_2_GAP_Shc_Grb2_Sos;  // isVersionOf GO:0006461
  v26: Ras_GDP + EGF_EGFR_2_GAP_Shc_Grb2_Sos -> x36; k18*Ras_GDP*EGF_EGFR_2_GAP_Shc_Grb2_Sos - kr18*x36;  // isVersionOf GO:0006461
  v27: x36 -> EGF_EGFR_2_GAP_Shc_Grb2_Sos + x28; k19*x36 - kr19*EGF_EGFR_2_GAP_Shc_Grb2_Sos*x28;  // isVersionOf GO:0043241
  v28: x28 + x41 -> Raf_Ras_GTP; k28*x28*x41 - kr28*Raf_Ras_GTP;  // isVersionOf GO:0006461
  v29: Raf_Ras_GTP -> x43 + x45; k29*Raf_Ras_GTP - kr29*x43*x45;  // isVersionOf GO:0043241
  v30: EGF_EGFR_2_GAP_Shc_Grb2_Sos + x43 -> x37; k20*EGF_EGFR_2_GAP_Shc_Grb2_Sos*x43 - kr20*x37;  // isVersionOf GO:0006461
  v31: x37 -> EGF_EGFR_2_GAP_Shc_Grb2_Sos + Ras_GDP; k21*x37 - kr21*EGF_EGFR_2_GAP_Shc_Grb2_Sos*Ras_GDP;  // isVersionOf GO:0043241
  v32: EGF_EGFR_2_GAP_Shc_Grb2_Sos -> EGF_EGFR_2_GAP + Shc_Grb2_Sos; k32*EGF_EGFR_2_GAP_Shc_Grb2_Sos - kr32*EGF_EGFR_2_GAP*Shc_Grb2_Sos;  // isVersionOf GO:0043241
  v33: Shc_Grb2_Sos -> x40 + Grb2_Sos; k33*Shc_Grb2_Sos - kr33*x40*Grb2_Sos;  // isVersionOf GO:0043241
  v34: EGF_EGFR_2_GAP_Grb2_Sos -> EGF_EGFR_2_GAP + Grb2_Sos; k34*EGF_EGFR_2_GAP_Grb2_Sos - kr34*EGF_EGFR_2_GAP*Grb2_Sos;  // isVersionOf GO:0043241
  v35: Grb2_Sos -> Sos + Grb2; k35*Grb2_Sos - kr35*Sos*Grb2;  // isVersionOf GO:0043241
  v36: x40 => x31; Vm36*x40/(Km36 + x40);  // isVersionOf MOD:00000
  v37: x33 -> EGF_EGFR_2_GAP + x40; k37*x33 - kr37*EGF_EGFR_2_GAP*x40;  // isVersionOf GO:0043241
  v38: Grb2 + x40 -> Shc_Grb2; k24*Grb2*x40 - kr24*Shc_Grb2;  // isVersionOf GO:0006461
  v39: EGF_EGFR_2_GAP_Shc_Grb2 -> EGF_EGFR_2_GAP + Shc_Grb2; k37*EGF_EGFR_2_GAP_Shc_Grb2 - kr37*EGF_EGFR_2_GAP*Shc_Grb2;  // isVersionOf GO:0043241
  v40: Sos + Shc_Grb2 -> Shc_Grb2_Sos; k40*Sos*Shc_Grb2 - kr40*Shc_Grb2_Sos;  // isVersionOf GO:0006461
  v41: Grb2_Sos + x33 -> EGF_EGFR_2_GAP_Shc_Grb2_Sos; k41*Grb2_Sos*x33 - kr41*EGF_EGFR_2_GAP_Shc_Grb2_Sos;  // isVersionOf GO:0006461
  v42: Phosphotase1 + x45 -> Raf_P_ase; k42*Phosphotase1*x45 - kr42*Raf_P_ase;  // isVersionOf GO:0006461
  v43: Raf_P_ase -> x41 + Phosphotase1; k43*Raf_P_ase;  // isVersionOf GO:0006461
  v44: MEK + x45 -> MEK_Raf; k44*MEK*x45 - kr44*MEK_Raf;  // isVersionOf GO:0006461
  v45: MEK_Raf -> MEK_P + x45; k45*MEK_Raf;  // isVersionOf GO:0043241
  v46: MEK_P + x45 -> MEK_P_Raf; k44*MEK_P*x45 - kr44*MEK_P_Raf;  // isVersionOf GO:0006461
  v47: MEK_P_Raf -> x51 + x45; k47*MEK_P_Raf;  // isVersionOf GO:0043241
  v48: x51 + Phosphatase2 -> MEK_PP_P_ase2; k48*x51*Phosphatase2 - kr48*MEK_PP_P_ase2;  // isVersionOf GO:0006461
  v49: MEK_PP_P_ase2 -> MEK_P + Phosphatase2; k49*MEK_PP_P_ase2;  // isVersionOf GO:0043241
  v50: Phosphatase2 + MEK_P -> MEK_P_P_ase2; k50*Phosphatase2*MEK_P - kr50*MEK_P_P_ase2;  // isVersionOf GO:0006461
  v51: MEK_P_P_ase2 -> MEK + Phosphatase2; k49*MEK_P_P_ase2;  // isVersionOf GO:0043241
  v52: ERK + x51 -> ERK_MEK_PP; k52*ERK*x51 - kr52*ERK_MEK_PP;  // isVersionOf GO:0006461
  v53: ERK_MEK_PP -> x51 + ERK_P; k53*ERK_MEK_PP;  // isVersionOf GO:0043241
  v54: x51 + ERK_P -> ERK_P_MEK_PP; k52*x51*ERK_P - kr52*ERK_P_MEK_PP;  // isVersionOf GO:0006461
  v55: ERK_P_MEK_PP -> x59 + x51; k55*ERK_P_MEK_PP;  // isVersionOf GO:0043241
  v56: x59 + Phosphotase3 -> ERK_PP_P_ase3; k56*x59*Phosphotase3 - kr56*ERK_PP_P_ase3;  // isVersionOf GO:0006461
  v57: ERK_PP_P_ase3 -> ERK_P + Phosphotase3; k57*ERK_PP_P_ase3;  // isVersionOf GO:0043241
  v58: Phosphotase3 + ERK_P -> ERK_P_P_ase3; k58*Phosphotase3*ERK_P - kr58*ERK_P_P_ase3;  // isVersionOf GO:0006461
  v59: ERK_P_P_ase3 -> ERK + Phosphotase3; k59*ERK_P_P_ase3;  // isVersionOf GO:0043241
  v60: EGFRi => EGFRideg; k60*EGFRi;  // isVersionOf GO:0030163
  v61: EGFi => EGFideg; k61*EGFi;  // isVersionOf GO:0030163
  v62: x8 => EGF_EGFRi_2deg; k60*x8;  // isVersionOf GO:0030163
  v63: EGF_EGFRi_2_GAP + Grb2 -> EGF_EGFRi_2_GAP_Grb2; k16*EGF_EGFRi_2_GAP*Grb2 - kr16*EGF_EGFRi_2_GAP_Grb2;  // isVersionOf GO:0006461
  v64: Sos + EGF_EGFRi_2_GAP_Grb2 -> EGF_EGFRi_2_GAP_Grb2_Sos; k17*Sos*EGF_EGFRi_2_GAP_Grb2 - kr17*EGF_EGFRi_2_GAP_Grb2_Sos;  // isVersionOf GO:0006461
  v65: Ras_GDP + EGF_EGFRi_2_GAP_Grb2_Sos -> EGF_EGFRi_2_GAP_Grb2_Sos_Ras_GDP; k18*Ras_GDP*EGF_EGFRi_2_GAP_Grb2_Sos - kr18*EGF_EGFRi_2_GAP_Grb2_Sos_Ras_GDP;  // isVersionOf GO:0006461
  v66: EGF_EGFRi_2_GAP_Grb2_Sos_Ras_GDP -> x69 + EGF_EGFRi_2_GAP_Grb2_Sos; k19*EGF_EGFRi_2_GAP_Grb2_Sos_Ras_GDP - kr19*x69*EGF_EGFRi_2_GAP_Grb2_Sos;  // isVersionOf GO:0043241
  v67: x71 + EGF_EGFRi_2_GAP_Grb2_Sos -> EGF_EGFRi_2_GAP_Grb2_Sos_Ras_GTP; k20*x71*EGF_EGFRi_2_GAP_Grb2_Sos - kr20*EGF_EGFRi_2_GAP_Grb2_Sos_Ras_GTP;  // isVersionOf GO:0006461
  v68: EGF_EGFRi_2_GAP_Grb2_Sos_Ras_GTP -> EGF_EGFRi_2_GAP_Grb2_Sos + Ras_GDP; k21*EGF_EGFRi_2_GAP_Grb2_Sos_Ras_GTP - kr21*EGF_EGFRi_2_GAP_Grb2_Sos*Ras_GDP;  // isVersionOf GO:0043241
  v69: x31 + EGF_EGFRi_2_GAP -> x63; k22*x31*EGF_EGFRi_2_GAP - kr22*x63;  // isVersionOf GO:0006461
  v70: x63 -> x64; k23*x63 - kr23*x64;  // isVersionOf MOD:00000
  v71: Grb2 + x64 -> EGF_EGFRi_2_GAP_Shc_Grb2; k24*Grb2*x64 - kr24*EGF_EGFRi_2_GAP_Shc_Grb2;  // isVersionOf GO:0006461
  v72: Sos + EGF_EGFRi_2_GAP_Shc_Grb2 -> EGF_EGFRi_2_GAP_Shc_Grb2_Sos; k25*Sos*EGF_EGFRi_2_GAP_Shc_Grb2 - kr25*EGF_EGFRi_2_GAP_Shc_Grb2_Sos;  // isVersionOf GO:0006461
  v73: Ras_GDP + EGF_EGFRi_2_GAP_Shc_Grb2_Sos -> x67; k18*Ras_GDP*EGF_EGFRi_2_GAP_Shc_Grb2_Sos - kr18*x67;  // isVersionOf GO:0006461
  v74: x67 -> EGF_EGFRi_2_GAP_Shc_Grb2_Sos + x69; k19*x67 - kr19*EGF_EGFRi_2_GAP_Shc_Grb2_Sos*x69;  // isVersionOf GO:0043241
  v75: x69 + x41 -> Rafi_Rasi_GTP; k28*x69*x41 - kr28*Rafi_Rasi_GTP;  // isVersionOf GO:0006461
  v76: Rafi_Rasi_GTP -> x71 + Rafi; k29*Rafi_Rasi_GTP - kr29*x71*Rafi;  // isVersionOf GO:0043241
  v77: x71 + EGF_EGFRi_2_GAP_Shc_Grb2_Sos -> x68; k20*x71*EGF_EGFRi_2_GAP_Shc_Grb2_Sos - kr20*x68;  // isVersionOf GO:0006461
  v78: x68 -> EGF_EGFRi_2_GAP_Shc_Grb2_Sos + Ras_GDP; k21*x68 - kr21*EGF_EGFRi_2_GAP_Shc_Grb2_Sos*Ras_GDP;  // isVersionOf GO:0043241
  v79: EGF_EGFRi_2_GAP_Shc_Grb2_Sos -> EGF_EGFRi_2_GAP + Shc_Grb2_Sos; k32*EGF_EGFRi_2_GAP_Shc_Grb2_Sos - kr32*EGF_EGFRi_2_GAP*Shc_Grb2_Sos;  // isVersionOf GO:0043241
  v80: EGF_EGFRi_2_GAP_Grb2_Sos -> EGF_EGFRi_2_GAP + Grb2_Sos; k34*EGF_EGFRi_2_GAP_Grb2_Sos - kr34*EGF_EGFRi_2_GAP*Grb2_Sos;  // isVersionOf GO:0043241
  v81: x64 -> EGF_EGFRi_2_GAP + x40; k37*x64 - kr37*EGF_EGFRi_2_GAP*x40;  // isVersionOf GO:0043241
  v82: EGF_EGFRi_2_GAP_Shc_Grb2 -> EGF_EGFRi_2_GAP + Shc_Grb2; k37*EGF_EGFRi_2_GAP_Shc_Grb2 - kr37*EGF_EGFRi_2_GAP*Shc_Grb2;  // isVersionOf GO:0043241
  v83: Grb2_Sos + x64 -> EGF_EGFRi_2_GAP_Shc_Grb2_Sos; k41*Grb2_Sos*x64 - kr41*EGF_EGFRi_2_GAP_Shc_Grb2_Sos;  // isVersionOf GO:0006461
  v84: Phosphotase1 + Rafi -> Rafi_P_ase; k42*Phosphotase1*Rafi - kr42*Rafi_P_ase;  // isVersionOf GO:0006461
  v85: Rafi_P_ase -> x41 + Phosphotase1; k43*Rafi_P_ase;  // isVersionOf GO:0043241
  v86: MEK + Rafi -> MEKi_Rafi; k44*MEK*Rafi - kr44*MEKi_Rafi;  // isVersionOf GO:0006461
  v87: MEKi_Rafi -> MEKi_P + Rafi; k45*MEKi_Rafi;  // isVersionOf GO:0043241
  v88: Rafi + MEKi_P -> MEKi_P_Rafi; k44*Rafi*MEKi_P - kr44*MEKi_P_Rafi;  // isVersionOf GO:0006461
  v89: MEKi_P_Rafi -> Rafi + MEKi_PP; k47*MEKi_P_Rafi;  // isVersionOf GO:0043241
  v90: MEKi_PP + Phosphatase2 -> MEKi_PP_P_ase2i; k48*MEKi_PP*Phosphatase2 - kr48*MEKi_PP_P_ase2i;  // isVersionOf GO:0006461
  v91: MEKi_PP_P_ase2i -> MEKi_P + Phosphatase2; k49*MEKi_PP_P_ase2i;  // isVersionOf GO:0043241
  v92: Phosphatase2 + MEKi_P -> MEKi_P_P_ase2i; k50*Phosphatase2*MEKi_P - kr50*MEKi_P_P_ase2i;  // isVersionOf GO:0006461
  v93: MEKi_P_P_ase2i -> MEK + Phosphatase2; k49*MEKi_P_P_ase2i;  // isVersionOf GO:0043241
  v94: ERK + MEKi_PP -> ERKi_MEKi_PP; k52*ERK*MEKi_PP - kr52*ERKi_MEKi_PP;  // isVersionOf GO:0006461
  v95: ERKi_MEKi_PP -> ERKi_P + MEKi_PP; k53*ERKi_MEKi_PP;  // isVersionOf GO:0043241
  v96: MEKi_PP + ERKi_P -> ERKi_P_MEKi_PP; k52*MEKi_PP*ERKi_P - kr52*ERKi_P_MEKi_PP;  // isVersionOf GO:0006461
  v97: ERKi_P_MEKi_PP -> ERKi_PP + MEKi_PP; k55*ERKi_P_MEKi_PP;  // isVersionOf GO:0043241
  v98: ERKi_PP + Phosphotase3 -> ERKi_PP_P_ase3i; k56*ERKi_PP*Phosphotase3 - kr56*ERKi_PP_P_ase3i;  // isVersionOf GO:0006461
  v99: ERKi_PP_P_ase3i -> ERKi_P + Phosphotase3; k57*ERKi_PP_P_ase3i;  // isVersionOf GO:0043241
  v100: Phosphotase3 + ERKi_P -> ERKi_P_P_ase3i; k58*Phosphotase3*ERKi_P - kr58*ERKi_P_P_ase3i;  // isVersionOf GO:0006461
  v101: ERKi_P_P_ase3i -> ERK + Phosphotase3; k59*ERKi_P_P_ase3i;  // isVersionOf GO:0043241
  v102: EGF_EGFR_2_GAP -> EGF_EGFRi_2_GAP; k6*EGF_EGFR_2_GAP - kr6*EGF_EGFRi_2_GAP;  // isVersionOf MOD:00000
  v103: x32 -> x63; k6*x32 - kr6*x63;  // isVersionOf MOD:00000
  v104: x33 -> x64; k6*x33 - kr6*x64;  // isVersionOf MOD:00000
  v105: EGF_EGFR_2_GAP_Grb2_Sos -> EGF_EGFRi_2_GAP_Grb2_Sos; k6*EGF_EGFR_2_GAP_Grb2_Sos - kr6*EGF_EGFRi_2_GAP_Grb2_Sos;  // isVersionOf MOD:00000
  v106: EGF_EGFR_2_GAP_Grb2_Sos + Prot -> EGF_EGFR_2_GAP_Grb2_Sos_Prot; k4*EGF_EGFR_2_GAP_Grb2_Sos*Prot - kr4*EGF_EGFR_2_GAP_Grb2_Sos_Prot;  // isVersionOf GO:0006461
  v107: EGF_EGFR_2_GAP_Grb2_Sos_Prot -> Proti + EGF_EGFRi_2_GAP_Grb2_Sos; k5*EGF_EGFR_2_GAP_Grb2_Sos_Prot;  // isVersionOf GO:0043241
  v108: EGF_EGFR_2_GAP_Grb2_Sos_Ras_GDP -> EGF_EGFRi_2_GAP_Grb2_Sos_Ras_GDP; k6*EGF_EGFR_2_GAP_Grb2_Sos_Ras_GDP - kr6*EGF_EGFRi_2_GAP_Grb2_Sos_Ras_GDP;  // isVersionOf MOD:00000
  v109: EGF_EGFR_2_GAP_Grb2_Sos_Ras_GDP + Prot -> x89; k4*EGF_EGFR_2_GAP_Grb2_Sos_Ras_GDP*Prot - kr4*x89;  // isVersionOf GO:0006461
  v110: x89 -> Proti + EGF_EGFRi_2_GAP_Grb2_Sos_Ras_GDP; k5*x89;  // isVersionOf GO:0043241
  v111: EGF_EGFR_2_GAP_Grb2_Sos_Ras_GTP -> EGF_EGFRi_2_GAP_Grb2_Sos_Ras_GTP; k6*EGF_EGFR_2_GAP_Grb2_Sos_Ras_GTP - kr6*EGF_EGFRi_2_GAP_Grb2_Sos_Ras_GTP;  // isVersionOf MOD:00000
  v112: EGF_EGFR_2_GAP_Grb2_Sos_Ras_GTP + Prot -> x90; k4*EGF_EGFR_2_GAP_Grb2_Sos_Ras_GTP*Prot - kr4*x90;  // isVersionOf GO:0006461
  v113: x90 -> Proti + EGF_EGFRi_2_GAP_Grb2_Sos_Ras_GTP; k5*x90;  // isVersionOf GO:0043241
  v114: EGF_EGFR_2_GAP_Shc_Grb2 -> EGF_EGFRi_2_GAP_Shc_Grb2; k6*EGF_EGFR_2_GAP_Shc_Grb2 - kr6*EGF_EGFRi_2_GAP_Shc_Grb2;  // isVersionOf MOD:00000
  v115: EGF_EGFR_2_GAP_Shc_Grb2 + Prot -> EGF_EGFR_2_GAP_Shc_Grb2_Prot; k4*EGF_EGFR_2_GAP_Shc_Grb2*Prot - kr4*EGF_EGFR_2_GAP_Shc_Grb2_Prot;  // isVersionOf GO:0006461
  v116: EGF_EGFR_2_GAP_Shc_Grb2_Prot -> Proti + EGF_EGFRi_2_GAP_Shc_Grb2; k5*EGF_EGFR_2_GAP_Shc_Grb2_Prot;  // isVersionOf GO:0043241
  v117: EGF_EGFR_2_GAP_Shc_Grb2_Sos -> EGF_EGFRi_2_GAP_Shc_Grb2_Sos; k6*EGF_EGFR_2_GAP_Shc_Grb2_Sos - kr6*EGF_EGFRi_2_GAP_Shc_Grb2_Sos;  // isVersionOf MOD:00000
  v118: EGF_EGFR_2_GAP_Shc_Grb2_Sos + Prot -> EGF_EGFR_2_GAP_Shc_Grb2_Sos_Prot; k4*EGF_EGFR_2_GAP_Shc_Grb2_Sos*Prot - kr4*EGF_EGFR_2_GAP_Shc_Grb2_Sos_Prot;  // isVersionOf GO:0006461
  v119: EGF_EGFR_2_GAP_Shc_Grb2_Sos_Prot -> Proti + EGF_EGFRi_2_GAP_Shc_Grb2_Sos; k5*EGF_EGFR_2_GAP_Shc_Grb2_Sos_Prot;  // isVersionOf GO:0043241
  v120: x36 -> x67; k6*x36 - kr6*x67;  // isVersionOf MOD:00000
  v121: x36 + Prot -> x93; k4*x36*Prot - kr4*x93;  // isVersionOf GO:0006461
  v122: x93 -> Proti + x67; k5*x93;  // isVersionOf GO:0043241
  v123: x37 -> x68; k6*x37 - kr6*x68;  // isVersionOf MOD:00000
  v124: x37 + Prot -> x94; k4*x37*Prot - kr4*x94;  // isVersionOf GO:0006461
  v125: x94 -> x68 + Proti; k5*x94;  // isVersionOf GO:0043241

  // Unit definitions:
  unit substance = item; substance is "items";
  unit time = 60 second; time is "min";
  unit volume = 1e-12 litre; volume is "pl";
  unit pmin = 1 / (60 second); pmin is "permin";
  unit ipmin = item / (60 second); ipmin is "itemspermin";
  unit pipmin = 1 / (60 second * item); pipmin is "peritempermin";
  unit piplpmin = 1e-12 litre / (item * 60 second); piplpmin is "plperitempermin";
  unit area = metre^2;
end
