// SBML level 2 version 4

model MPModel()
  // Perceptron
  // Description: Perceptron
  // This model has been automatically generated by the MetaPlab SBML plugin.
  // The original model has time unit = 0.1 seconds and time resolution = 1.0
  // In order to obtain the same dynamics of the original model, the user should calculate it by means of the Euler algorithm with dT = 1.0 (which corresponds to 0.1 seconds)

  // Compartments:
  compartment skin = 1 volume; skin is "skin membrane";

  // Species:
  species $X1v0 in skin = 1; X1v0 is "Substance";
  species $X2v0 in skin = 1; X2v0 is "Substance";
  species $W2po in skin = 9; W2po is "Substance";
  species $W0ne in skin = 5; W0ne is "Substance";
  species $W1po in skin = 8; W1po is "Substance";
  species $X1v1 in skin = 0; X1v1 is "Substance";
  species $X2v1 in skin = 0; X2v1 is "Substance";
  species $Zpo in skin = 0; Zpo is "Substance";
  species $W1pox in skin = 0; W1pox is "Substance";
  species $W2pox in skin = 0; W2pox is "Substance";
  species $W0nex in skin = 0; W0nex is "Substance";
  species $Zne in skin = 0; Zne is "Substance";
  species $Yv0 in skin = 0; Yv0 is "Substance";
  species $Yv1 in skin = 0; Yv1 is "Substance";
  species $Dv1 in skin = 0; Dv1 is "Substance";
  species $Dv0 in skin = 1; Dv0 is "Substance";
  species $W1ne in skin = 0; W1ne is "Substance";
  species $W1nex in skin = 0; W1nex is "Substance";
  species $W2ne in skin = 0; W2ne is "Substance";
  species $W2nex in skin = 0; W2nex is "Substance";
  species $W0pox in skin = 0; W0pox is "Substance";
  species $W0po in skin = 0; W0po is "Substance";

  // Parameters:
  // MP measure unit: mol
  I = 100 dimensionless; I is "Inertia";
  WxSum has dimensionless; WxSum is "Parameter";
  WSum has dimensionless; WSum is "Parameter";
  WSumNegF has dimensionless; WSumNegF is "Parameter";
  XSum has dimensionless; XSum is "Parameter";
  XSumNegF has dimensionless; XSumNegF is "Parameter";

  // Assignment rules:
  WxSum := W0pox + W0nex + W1pox + W1nex + W2pox + W2nex;
  WSum := W0po + W0ne + W1po + W1ne + W2po + W2ne;
  WSumNegF := 0.08/(3.3 + 0.2*WSum)^2;
  XSum := X1v0 + X1v1 + X2v0 + X2v1;
  XSumNegF := 2/(1 + 4*XSum);

  // Reactions:
  // Flux name: F4
  R4: $W1po => $W1pox; 0.1*X1v0^2*W1po;  // modifiers: X1v0
  // Flux name: F10
  R10: $W2po => $Zpo + $W2pox; 0.1*X2v1^2*W2po;  // modifiers: X2v1
  // Flux name: F9
  R9: $W2po => $W2pox; 0.1*X2v0^2*W2po;  // modifiers: X2v0
  // Flux name: F5
  R5: $W1po => $Zpo + $W1pox; 0.1*X1v1^2*W1po;  // modifiers: X1v1
  // Flux name: F2
  R2: $W0ne => $W0nex + $Zne; 0.025*W0ne*XSum^2;
  // Flux name: F14
  R14: $Zpo + $Zne => ; piecewise(0.5*Zne, Zne < Zpo, 0.5*Zpo);
  // Flux name: F15
  R15: $Zpo => $Yv1; 0.01*Zpo/(1 + Zne);  // modifiers: Zne
  // Flux name: F16
  R16: $Zne => $Yv0; 0.01*Zne/(1 + Zpo);  // modifiers: Zpo
  // Flux name: F30
  R30: $Dv0 => ; 0.001*Dv0*XSumNegF;
  // Flux name: F37
  R37: $Dv1 => $W2po; 0.006*Dv1*Yv0*X2v1;  // modifiers: Yv0, X2v1
  // Flux name: F34
  R34: $Dv0 => $W2ne; 0.006*Dv0*Yv1*X2v1;  // modifiers: Yv1, X2v1
  // Flux name: F31
  R31: $Dv1 => ; 0.001*Dv1*XSumNegF;
  // Flux name: F17
  R17: $X1v0 => ; X1v0*WSumNegF;
  // Flux name: F18
  R18: $X1v1 => ; X1v1*WSumNegF;
  // Flux name: F20
  R20: $X2v1 => ; X2v1*WSumNegF;
  // Flux name: F19
  R19: $X2v0 => ; X2v0*WSumNegF;
  // Flux name: F23
  R23: $W1pox => $W1po; 0.003*W1pox*XSumNegF^2;
  // Flux name: F25
  R25: $W2pox => $W2po; 0.003*W2pox*XSumNegF^2;
  // Flux name: F22
  R22: $W0nex => $W0ne; 0.003*W0nex*XSumNegF^2;
  // Flux name: F6
  R6: $W1ne => $W1nex; 0.1*X1v0^2*W1ne;  // modifiers: X1v0
  // Flux name: F7
  R7: $W1ne => $Zne + $W1nex; 0.1*X1v1^2*W1ne;  // modifiers: X1v1
  // Flux name: F11
  R11: $W2ne => $W2nex; 0.1*X2v0^2*W2ne;  // modifiers: X2v0
  // Flux name: F12
  R12: $W2ne => $W2nex + $Zne; 0.1*X2v1^2*W2ne;  // modifiers: X2v1
  // Flux name: F1
  R1: $W0po => $W0pox + $Zpo; 0.025*W0po*XSum^2;
  // Flux name: F24
  R24: $W1nex => $W1ne; 0.003*W1nex*XSumNegF^2;
  // Flux name: F26
  R26: $W2nex => $W2ne; 0.003*W2nex*XSumNegF^2;
  // Flux name: F21
  R21: $W0pox => $W0po; 0.003*W0pox*XSumNegF^2;
  // Flux name: F33
  R33: $Dv0 => $W1ne; 0.006*Dv0*Yv1*X1v1;  // modifiers: X1v1, Yv1
  // Flux name: F36
  R36: $Dv1 => $W1po; 0.006*Dv1*Yv0*X1v1;  // modifiers: X1v1, Yv0
  // Flux name: F35
  R35: $Dv1 => $W0po; 0.003*Dv1*Yv0*XSum;  // modifiers: Yv0
  // Flux name: F32
  R32: $Dv0 => $W0ne; 0.003*Dv0*Yv1*XSum;  // modifiers: Yv1
  // Flux name: F3
  R3: $W0po + $W0ne => ; piecewise(0.1*W0po, W0po < W0ne, 0.1*W0ne);
  // Flux name: F8
  R8: $W1ne + $W1po => ; piecewise(0.1*W1po, W1po < W1ne, 0.1*W1ne);
  // Flux name: F13
  R13: $W2po + $W2ne => ; piecewise(0.1*W2po, W2po < W2ne, 0.1*W2ne);
  // Flux name: F28
  R28: $Yv0 => ; 0.001*Yv0*XSumNegF;
  // Flux name: F29
  R29: $Yv1 => ; 0.001*Yv1*XSumNegF;
  // Flux name: F27
  R27: $Yv0 + $Yv1 => ; piecewise(0.5*Yv0, Yv0 < Yv1, 0.5*Yv1);
end
