// SBML level 2 version 4

model MPModel()
  // Sirius creativus
  // Description: none
  // This model has been automatically generated by the MetaPlab SBML plugin.
  // The original model has time unit = 1.0 seconds and time resolution = 1.0
  // In order to obtain the same dynamics of the original model, the user should calculate it by means of the Euler algorithm with dT = 1.0 (which corresponds to 1.0 seconds)

  // Compartments:
  compartment skin = 1 volume; skin is "skin membrane";

  // Species:
  species $A in skin = 100; A is "Substance A";
  species $B in skin = 100; B is "Substance B";
  species $C in skin = 0.02; C is "Substance C";

  // Parameters:
  I = 100 dimensionless; I is "Inertia";

  // Reactions:
  // Flux name: F0
  R0: => $A; 10/(I + 10 + 0.02*C + 0.02*B)*A;  // modifiers: C, B
  // Flux name: F1
  R1: $A => $B; 0.02*C/(I + 10 + 0.02*C + 0.02*B)*A;  // modifiers: C
  // Flux name: F2
  R2: $A => $C; 0.02*B/(I + 10 + 0.02*C + 0.02*B)*A;  // modifiers: B
  // Flux name: F3
  R3: $B => ; 4/(I + 4)*B;
  // Flux name: F4
  R4: $C => ; 4/(I + 4)*C;
end
