// SBML level 2 version 4

model MPModel()
  // Sirius reactivus
  // Description: none
  // This model has been automatically generated by the MetaPlab SBML plugin.
  // The original model has time unit = 1.0 seconds and time resolution = 1.0
  // In order to obtain the same dynamics of the original model, the user should calculate it by means of the Euler algorithm with dT = 1.0 (which corresponds to 1.0 seconds)

  // Compartments:
  compartment skin = 1 volume; skin is "skin membrane";

  // Species:
  species $A in skin = 100; A is "Substance A";
  species $B in skin = 100; B is "Substance B";
  species $C in skin = 0; C is "Substance C";

  // Parameters:
  I = 100 dimensionless; I is "Inertia";
  R0React has dimensionless; R0React is "Parameter";
  R1React has dimensionless; R1React is "Parameter";
  R2React has dimensionless; R2React is "Parameter";
  R3React has dimensionless; R3React is "Parameter";
  R4React has dimensionless; R4React is "Parameter";
  APress has dimensionless; APress is "Parameter";
  BPress has dimensionless; BPress is "Parameter";
  CPress has dimensionless; CPress is "Parameter";

  // Assignment rules:
  R0React := 10;
  R1React := 0.02*C;
  R2React := 0.02*B;
  R3React := 4;
  R4React := 4;
  APress := R0React + R1React + R2React;
  BPress := R3React;
  CPress := R4React;

  // Reactions:
  // Flux name: F0
  R0: => $A; R0React*A/(I + APress);
  // Flux name: F1
  R1: $A => $B; R1React*A/(I + APress);
  // Flux name: F2
  R2: $A => $C; R2React*A/(I + APress);
  // Flux name: F3
  R3: $B => ; R3React*B/(I + BPress);
  // Flux name: F4
  R4: $C => ; R4React*C/(I + CPress);
end
