// SBML level 2 version 4

model MPModel()
  // Sirius binarius
  // Description: none
  // This model has been automatically generated by the MetaPlab SBML plugin.
  // The original model has time unit = 1.0 seconds and time resolution = 1.0
  // In order to obtain the same dynamics of the original model, the user should calculate it by means of the Euler algorithm with dT = 1.0 (which corresponds to 1.0 seconds)

  // Compartments:
  compartment skin = 1 volume; skin is "skin membrane";

  // Species:
  species $A in skin = 100; A is "Substance A";
  species $B in skin = 100; B is "Substance B";

  // Parameters:
  I = 100 dimensionless; I is "Inertia";

  // Reactions:
  // Flux name: F0
  R0: => $A; 20*A/(0.04*B + 100);  // modifiers: B
  // Flux name: F1
  R1: $A => $B; 0.04*B/(I + 0.04*B)*A;
  // Flux name: F3
  R3: $B => ; 1/(I + 1)*B;
end
