// SBML level 2 version 4

model MPModel()
  // Mizar erraticus
  // Description: none
  // This model has been automatically generated by the MetaPlab SBML plugin.
  // The original model has time unit = 1.0 seconds and time resolution = 1.0
  // In order to obtain the same dynamics of the original model, the user should calculate it by means of the Euler algorithm with dT = 1.0 (which corresponds to 1.0 seconds)

  // Compartments:
  compartment skin = 1 volume; skin is "skin membrane";

  // Species:
  species $A in skin = 60; A is "Substance A";
  species $B in skin = 100; B is "Substance B";
  species $C in skin = 300; C is "Substance C";

  // Parameters:
  Ia = 5 dimensionless; Ia is "Inertia of A";
  Ibc = 5 dimensionless; Ibc is "Inertia of B and C";

  // Reactions:
  // Flux name: F0
  R0: => $A; 40/sqrt((C - B)^2)/(Ia + 40/sqrt((C - B)^2) + 2 + 5)*A;  // modifiers: C, B
  // Flux name: F1
  R1: $A => $B; 2/(Ia + 40/sqrt((C - B)^2) + 2 + 5)*A;  // modifiers: C
  // Flux name: F2
  R2: $A => $C; 5/(Ia + 40/sqrt((C - B)^2) + 2 + 5)*A;  // modifiers: B
  // Flux name: F3
  R3: $B => ; (C - C + 0.2)/(Ibc + (C - C) + 0.2)*B;  // modifiers: C
  // Flux name: F4
  R4: $C => ; 0.3/(Ibc + 0.3)*C;
end
