// SBML level 2 version 4

model MPModel()
  // Vega arcuatus
  // Description: none
  // This model has been automatically generated by the MetaPlab SBML plugin.
  // The original model has time unit = 1.0 seconds and time resolution = 1.0
  // In order to obtain the same dynamics of the original model, the user should calculate it by means of the Euler algorithm with dT = 1.0 (which corresponds to 1.0 seconds)

  // Compartments:
  compartment skin = 1 volume; skin is "skin membrane";

  // Species:
  species $A in skin = 110; A is "Substance A";
  species $B in skin = 10; B is "Substance B";
  species $C in skin = 30; C is "Substance C";
  species $E in skin = 1; E is "Substance E";
  species $D in skin = 1; D is "Substance D";

  // Parameters:
  I = 1 dimensionless; I is "Inertia";

  // Reactions:
  // Flux name: F0
  R0: $A => $B; A/(I + A)*A;
  // Flux name: F1
  R1: $B => $C; B/10/(I + B/10)*B;
  // Flux name: F2
  R2: $C => $D; C/10/(I + C/10 + D)*C;
  // Flux name: F3
  R3: $E => $A; E/(I + E)*E;
  // Flux name: F4
  R4: $D => $E; C/(I + C)*D;  // modifiers: C
  // Flux name: F5
  R5: $C => $E; D/(I + D + C/10)*C;  // modifiers: D
end
