// SBML level 2 version 4

model MPModel()
  // Mitotic oscillator
  // Description: Model of the mitotic oscillator found in early amphibian embryos.
  // This model has been automatically generated by the MetaPlab SBML plugin.
  // The original model has time unit = 1.0 minutes and time resolution = 1.0
  // In order to obtain the same dynamics of the original model, the user should calculate it by means of the Euler algorithm with dT = 1.0 (which corresponds to 1.0 minutes)

  // Compartments:
  compartment skin = 1 volume; skin is "skin membrane";

  // Species:
  species $C in skin = 0.01; C is "Cyclin";
  species $Mp in skin = 0.99; Mp is "Inactive cdc2 kinase";
  species $Xp in skin = 0.99; Xp is "Inactive protease";
  species $M in skin = 0.01; M is "Active cdc2 kinase";
  species $X in skin = 0.01; X is "Active Protease";

  // Parameters:
  I = 2000 dimensionless; I is "Inertia";
  K1 = 0.005 dimensionless; K1 is "none";
  K2 = 0.005 dimensionless; K2 is "none";
  K3 = 0.005 dimensionless; K3 is "none";
  K4 = 0.005 dimensionless; K4 is "none";
  KKd = 0.02 dimensionless; KKd is "none";
  Kc = 0.5 dimensionless; Kc is "none";
  // MP measure unit: min^(-1)
  Kd = 0.01 dimensionless; Kd is "none";
  // MP measure unit: min^(-1)
  V2 = 1.5 dimensionless; V2 is "none";
  // MP measure unit: min^(-1)
  V4 = 0.5 dimensionless; V4 is "none";
  // MP measure unit: min^(-1)
  VM1 = 3 dimensionless; VM1 is "none";
  // MP measure unit: min^(-1)
  VM3 = 1 dimensionless; VM3 is "none";
  Vd = 0.25 dimensionless; Vd is "none";
  Vi = 0.025 dimensionless; Vi is "none";

  // Reactions:
  // Flux name: F1
  R1: => $C; Vi/(I + Vi);
  // Flux name: F2
  R2: $C => $X; Vd*X/(KKd + C)/(I + Kd + Vd*X/(KKd + C) + VM1*Mp/((Kc + C)*(K1 + Mp)))*C;  // modifiers: Mp
  // Flux name: F3
  R3: $X => ; Vd*C/(KKd + C)/(I + Vd*C/(KKd + C) + V4/(K4 + X))*X;  // modifiers: C
  // Flux name: F4
  R4: $C => ; Kd/(I + Kd + Vd*X/(KKd + C) + VM1*Mp/((Kc + C)*(K1 + Mp)))*C;  // modifiers: X, Mp
  // Flux name: F5
  R5: $C => $C + $M; VM1*Mp/((Kc + C)*(K1 + Mp))/(I + Kd + Vd*X/(KKd + C) + VM1*Mp/((Kc + C)*(K1 + Mp)))*C;  // modifiers: X, Mp
  // Flux name: F6
  R6: $Mp => ; VM1*C/((Kc + C)*(K1 + Mp))/(I + VM1*C/((Kc + C)*(K1 + Mp)))*Mp;  // modifiers: C
  // Flux name: F7
  R7: $M => $Mp; V2/(K2 + M)/(I + VM3*Xp/(K3 + Xp) + V2/(K2 + M))*M;  // modifiers: Xp
  // Flux name: F8
  R8: $Xp => $X + $M; VM3*M/(K3 + Xp)/(I + VM3*M/(K3 + Xp))*Xp;
  // Flux name: F9
  R9: $M => ; VM3*Xp/(K3 + Xp)/(I + VM3*Xp/(K3 + Xp) + V2/(K2 + M))*M;  // modifiers: Xp
  // Flux name: F10
  R10: $X => $Xp; V4/(K4 + X)/(I + Vd*C/(KKd + C) + V4/(K4 + X))*X;  // modifiers: C
end
