// SBML level 2 version 4

model MPModel()
  // Mitotic oscillator
  // Description: Model of the mitotic oscillator found in early amphibian embryos.
  // This model has been automatically generated by the MetaPlab SBML plugin.
  // The original model has time unit = 1.0 minutes and time resolution = 0.0010
  // In order to obtain the same dynamics of the original model, the user should calculate it by means of the Euler algorithm with dT = 0.0010 (which corresponds to 0.0010 minutes)

  // Compartments:
  compartment skin = 1 volume; skin is "skin membrane";

  // Species:
  species $C in skin = 0.01; C is "Cyclin";
  species $Mp in skin = 0.99; Mp is "Inactive cdc2 kinase";
  species $Xp in skin = 0.99; Xp is "Inactive protease";
  species $M in skin = 0.01; M is "Active cdc2 kinase";
  species $X in skin = 0.01; X is "Active Protease";

  // Parameters:
  K1 = 0.005 dimensionless; K1 is "none";
  K2 = 0.005 dimensionless; K2 is "none";
  K3 = 0.005 dimensionless; K3 is "none";
  K4 = 0.005 dimensionless; K4 is "none";
  KKd = 0.02 dimensionless; KKd is "none";
  Kc = 0.5 dimensionless; Kc is "none";
  // MP measure unit: min^(-1)
  Kd = 0.01 dimensionless; Kd is "none";
  // MP measure unit: min^(-1)
  V2 = 1.5 dimensionless; V2 is "none";
  // MP measure unit: min^(-1)
  V4 = 0.5 dimensionless; V4 is "none";
  // MP measure unit: min^(-1)
  VM1 = 3 dimensionless; VM1 is "none";
  // MP measure unit: min^(-1)
  VM3 = 1 dimensionless; VM3 is "none";
  Vd = 0.25 dimensionless; Vd is "none";
  Vi = 0.025 dimensionless; Vi is "none";
  V1 has dimensionless; V1 is "Parameter";
  V3 has dimensionless; V3 is "Parameter";

  // Assignment rules:
  V1 := C*VM1/(Kc + C);
  V3 := M*VM3;

  // Reactions:
  // Flux name: F1
  R1: => $C; Vi;
  // Flux name: F4
  R4: $X + $C => $X; Vd*X*C/(KKd + C);
  // Flux name: F2
  R2: $C => ; Kd*C;
  // Flux name: F3
  R3: $C + $Mp => $M + $C; V1*Mp/(K1 + Mp);
  // Flux name: F5
  R5: $M => $Mp; V2*M/(K2 + M);
  // Flux name: F6
  R6: $M + $Xp => $X + $M; V3*Xp/(K3 + Xp);
  // Flux name: F7
  R7: $X => $Xp; V4*X/(K4 + X);
end
