// SBML level 2 version 4

model MPModel()
  // Brusselator model
  // Description: Brusselator model of the Belousov-Zhabotinsky reaction.
  // This model has been automatically generated by the MetaPlab SBML plugin.
  // The original model has time unit = 1.0 seconds and time resolution = 1.0
  // In order to obtain the same dynamics of the original model, the user should calculate it by means of the Euler algorithm with dT = 1.0 (which corresponds to 1.0 seconds)

  // Compartments:
  compartment skin = 1 volume; skin is "skin membrane";

  // Species:
  species $React in skin = 50; React is "Reactant";
  species $Prod in skin = 5000; Prod is "Product";

  // Parameters:
  I = 1e-7 dimensionless; I is "Inertia";
  P has dimensionless; P is "Parameter";
  FluxUN has dimensionless; FluxUN is "Parameter";
  FluxSN has dimensionless; FluxSN is "Parameter";
  FluxTN has dimensionless; FluxTN is "Parameter";

  // Assignment rules:
  P := I + 5*React + 200*React + 900*React^2*Prod;
  FluxUN := 5*React^2/P;
  FluxSN := piecewise(900*React^3*Prod/(2*P), 900*React^3*Prod/(2*P) < 900*React^2*Prod^2/(I + 900*React^2*Prod), 900*React^2*Prod^2/(I + 900*React^2*Prod));
  FluxTN := 200*React^2/P;

  // Reactions:
  // Flux name: FluxS
  S: $Prod + 2 $React => 3 $React; piecewise(900*React^2*Prod/P*(React/2), 900*React^2*Prod/P*(React/2) < 900*React^2*Prod/(I + 900*React^2*Prod)*Prod, 900*React^2*Prod/(I + 900*React^2*Prod)*Prod);
  // Flux name: FluxR
  R: => $React; 10;
  // Flux name: FluxT
  T: $React => $Prod; 200*React/(I + 5*React + 200*React + 900*React^2*Prod)*React;
  // Flux name: FluxU
  U: $React => ; 5*React/(I + 5*React + 200*React + 900*React^2*Prod)*React;  // modifiers: Prod
end
