// SBML level 2 version 4

model MPModel()
  // An MP solver for the 3x+1 problem
  // Description: An MP solver which uses an MP Collatz dynamical system
  // This model has been automatically generated by the MetaPlab SBML plugin.
  // The original model has time unit = 1.0 seconds and time resolution = 1.0
  // In order to obtain the same dynamics of the original model, the user should calculate it by means of the Euler algorithm with dT = 1.0 (which corresponds to 1.0 seconds)

  // Compartments:
  compartment skin = 1 volume; skin is "skin membrane";

  // Species:
  species $Nc in skin = 2; Nc is "Substance";
  species $absOldNumber in skin = 2; absOldNumber is "Old reference for the absolute value of Number";
  species $signOldNumber in skin = 1; signOldNumber is "Old reference for the sign of Number";

  // Parameters:
  Number has dimensionless; Number is "Parameter";
  // Additional information: Old reference for Number
  oldNumber has dimensionless; oldNumber is "Old reference for Number";

  // Assignment rules:
  Number := piecewise(oldNumber + 1, Nc < oldNumber, oldNumber);
  oldNumber := piecewise(absOldNumber, signOldNumber == 1, -absOldNumber);

  // Reactions:
  // Flux name: FIns
  Ins: => $Nc; ;
  // Flux name: FDel
  Del: $Nc => ; ;
  // Flux name: FInc
  Inc: => $Nc; (Nc < Number)*(Number - Nc + 1);
  // Flux name: FIabsOldNumber
  // Additional information: Input flux for absOldNumber
  RIabsOldNumber: => $absOldNumber; abs(Number);
  // Flux name: FOabsOldNumber
  // Additional information: Output flux for absOldNumber
  ROabsOldNumber: $absOldNumber => ; absOldNumber;
  // Flux name: FIsignOldNumber
  // Additional information: Input flux for signOldNumber
  RIsignOldNumber: => $signOldNumber; piecewise(1, Number >= 0, 0);
  // Flux name: FOsignOldNumber
  // Additional information: Output flux for signOldNumber
  ROsignOldNumber: $signOldNumber => ; signOldNumber;
end
