// SBML level 2 version 4

model MPModel()
  // Goniometricus
  // Description: none
  // This model has been automatically generated by the MetaPlab SBML plugin.
  // The original model has time unit = 0.01 rad and time resolution = 1.0
  // In order to obtain the same dynamics of the original model, the user should calculate it by means of the Euler algorithm with dT = 1.0 (which corresponds to 0.01 rad)

  // Compartments:
  compartment skin = 1 volume; skin is "skin membrane";

  // Species:
  species $A in skin = 1001; A is "Cosinus+Inc";
  species $B in skin = 1000; B is "Sinus+Inc";

  // Parameters:
  // MP measure unit: mole
  Inc = 1000 dimensionless; Inc is "Increment";
  K2 has dimensionless; K2 is "Parameter";
  Cosinus has dimensionless; Cosinus is "Parameter";
  Sinus has dimensionless; Sinus is "Parameter";
  K3 has dimensionless; K3 is "Parameter";
  K4 has dimensionless; K4 is "Parameter";
  K1 has dimensionless; K1 is "Parameter";
  K5 has dimensionless; K5 is "Parameter";
  K6 has dimensionless; K6 is "Parameter";

  // Assignment rules:
  K2 := 0.09999917;
  Cosinus := A - Inc;
  Sinus := B - Inc;
  K3 := 9.949834;
  K4 := 0.009999833;
  K1 := 0.009949834;
  K5 := 0.009999833;
  K6 := 0.01004983;

  // Reactions:
  // Flux name: F1
  R1: => $A; K1*A + K2;
  // Flux name: F3
  R3: $B => ; K6*B;
  // Flux name: F2
  R2: $A => $B; K4*A + K5*B - K3;
end
