// SBML level 2 version 4

model MPModel()
  // Lotka Volterra
  // Description: The Lotka Volterra pred-prey model.
  // This model has been automatically generated by the MetaPlab SBML plugin.
  // The original model has time unit = 1.0 seconds and time resolution = 1.0
  // In order to obtain the same dynamics of the original model, the user should calculate it by means of the Euler algorithm with dT = 1.0 (which corresponds to 1.0 seconds)

  // Compartments:
  compartment skin = 1 volume; skin is "skin membrane";

  // Species:
  species $Prey in skin = 900;
  species $Pred in skin = 900; Pred is "Predators";

  // Parameters:
  I = 5 dimensionless; I is "Inertia";
  K0 = 0.03 dimensionless; K0 is "Const0";
  K1 = 4e-5 dimensionless; K1 is "Const1";
  K2 = 0.03 dimensionless; K2 is "Const2";
  R0React has dimensionless; R0React is "Reactivity of R0";
  R1React has dimensionless; R1React is "Reactivity of R1";
  PreyPress has dimensionless; PreyPress is "Prey pressure";
  R2React has dimensionless; R2React is "Reactivity of R2";
  PredPress has dimensionless; PredPress is "Predator pressure";

  // Assignment rules:
  R0React := K0;
  R1React := K1*piecewise(Prey, Prey > Pred, Pred);
  PreyPress := R0React + R1React;
  R2React := K2;
  PredPress := R1React + R2React;

  // Reactions:
  // Flux name: Fr0
  R0: $Prey => 2 $Prey; R0React*Prey/(I + PreyPress);
  // Flux name: Fr1
  R1: $Pred + $Prey => 2 $Pred; piecewise(R1React*Prey/(I + PreyPress), R1React*Prey/(I + PreyPress) < R1React*Pred/(I + PredPress), R1React*Pred/(I + PredPress));
  // Flux name: Fr2
  R2: $Pred => ; R2React*Pred/(I + PredPress);
end
