// SBML level 2 version 4

model MPModel()
  // Simulation proof of old values
  // Description: none
  // This model has been automatically generated by the MetaPlab SBML plugin.
  // The original model has time unit = 1.0 seconds and time resolution = 1.0
  // In order to obtain the same dynamics of the original model, the user should calculate it by means of the Euler algorithm with dT = 1.0 (which corresponds to 1.0 seconds)

  // Compartments:
  compartment skin = 1 volume; skin is "skin membrane";

  // Species:
  species $S in skin = 0; S is "Substance";
  species $OldS in skin = 0; OldS is "Substance";
  species $AbsOldP in skin = 10; AbsOldP is "Substance";
  species $SignOldP in skin = 0; SignOldP is "Substance";
  species $oldS in skin = 0; oldS is "Old reference for S";
  species $absOldP in skin = 10; absOldP is "Old reference for the absolute value of P";
  species $signOldP in skin = 0; signOldP is "Old reference for the sign of P";

  // Parameters:
  P0 has dimensionless; P0 is "Parameter";
  P1 has dimensionless; P1 is "Parameter";
  P has dimensionless; P is "Parameter";
  P3 has dimensionless; P3 is "Parameter";
  P4 has dimensionless; P4 is "Parameter";
  OldP has dimensionless; OldP is "Parameter";
  // Additional information: Old reference for P
  oldP has dimensionless; oldP is "Old reference for P";

  // Assignment rules:
  P0 := S;
  P1 := oldS;
  P := oldP + 1;
  P3 := P;
  P4 := oldP;
  OldP := piecewise(AbsOldP, SignOldP == 1, -AbsOldP);
  oldP := piecewise(absOldP, signOldP == 1, -absOldP);

  // Reactions:
  // Flux name: F0
  R0: => $S; 1;
  // Flux name: F1
  R1: => $OldS; S;  // modifiers: S
  // Flux name: F2
  R2: $OldS => ; OldS;
  // Flux name: F3
  R3: $AbsOldP => ; AbsOldP;
  // Flux name: F6
  R4: $SignOldP => ; SignOldP;
  // Flux name: F5
  R5: => $SignOldP; piecewise(1, P >= 0, 0);
  // Flux name: F4
  R6: => $AbsOldP; abs(P);
  // Flux name: FIoldS
  // Additional information: Input flux for oldS
  RIoldS: => $oldS; S;  // modifiers: S
  // Flux name: FOoldS
  // Additional information: Output flux for oldS
  ROoldS: $oldS => ; oldS;
  // Flux name: FIabsOldP
  // Additional information: Input flux for absOldP
  RIabsOldP: => $absOldP; abs(P);
  // Flux name: FOabsOldP
  // Additional information: Output flux for absOldP
  ROabsOldP: $absOldP => ; absOldP;
  // Flux name: FIsignOldP
  // Additional information: Input flux for signOldP
  RIsignOldP: => $signOldP; piecewise(1, P >= 0, 0);
  // Flux name: FOsignOldP
  // Additional information: Output flux for signOldP
  ROsignOldP: $signOldP => ; signOldP;
end
