// SBML level 2 version 4

model MPModel()
  // Sinus
  // Description: none
  // This model has been automatically generated by the MetaPlab SBML plugin.
  // The original model has time unit = 1.0E-4 seconds and time resolution = 1.0
  // In order to obtain the same dynamics of the original model, the user should calculate it by means of the Euler algorithm with dT = 1.0 (which corresponds to 1.0E-4 seconds)

  // Compartments:
  compartment skin = 1 volume; skin is "skin membrane";

  // Species:
  species $S in skin = 0.0001; S is "Absolute sinus";
  species $Tmp in skin = 0.9999; Tmp is "Substance";
  species $absOldClk in skin = 0; absOldClk is "Old reference for the absolute value of Clk";
  species $signOldClk in skin = 1; signOldClk is "Old reference for the sign of Clk";
  species $absOldSign in skin = 1; absOldSign is "Old reference for the absolute value of Sign";
  species $signOldSign in skin = 1; signOldSign is "Old reference for the sign of Sign";

  // Parameters:
  K = 0.0001 dimensionless;
  Clk has dimensionless; Clk is "Parameter";
  Sign has dimensionless; Sign is "Parameter";
  Sinus has dimensionless; Sinus is "Parameter";
  // Additional information: Old reference for Clk
  oldClk has dimensionless; oldClk is "Old reference for Clk";
  // Additional information: Old reference for Sign
  oldSign has dimensionless; oldSign is "Old reference for Sign";

  // Assignment rules:
  Clk := piecewise(0, S <= K, piecewise(1, S >= 1 - K, oldClk));
  Sign := piecewise(!oldSign, Tmp >= 1 - K, oldSign);
  Sinus := (Sign == 1)*S + (Sign == 0)*(-S);
  oldClk := piecewise(absOldClk, signOldClk == 1, -absOldClk);
  oldSign := piecewise(absOldSign, signOldSign == 1, -absOldSign);

  // Reactions:
  // Flux name: F1
  R1: $Tmp => $S; (Clk == 0)*K*sqrt(1 - S^2);
  // Flux name: F2
  R2: $S => $Tmp; (Clk == 1)*K*sqrt(1 - S^2);
  // Flux name: FIabsOldClk
  // Additional information: Input flux for absOldClk
  RIabsOldClk: => $absOldClk; abs(Clk);
  // Flux name: FOabsOldClk
  // Additional information: Output flux for absOldClk
  ROabsOldClk: $absOldClk => ; absOldClk;
  // Flux name: FIsignOldClk
  // Additional information: Input flux for signOldClk
  RIsignOldClk: => $signOldClk; piecewise(1, Clk >= 0, 0);
  // Flux name: FOsignOldClk
  // Additional information: Output flux for signOldClk
  ROsignOldClk: $signOldClk => ; signOldClk;
  // Flux name: FIabsOldSign
  // Additional information: Input flux for absOldSign
  RIabsOldSign: => $absOldSign; abs(Sign);
  // Flux name: FOabsOldSign
  // Additional information: Output flux for absOldSign
  ROabsOldSign: $absOldSign => ; absOldSign;
  // Flux name: FIsignOldSign
  // Additional information: Input flux for signOldSign
  RIsignOldSign: => $signOldSign; piecewise(1, Sign >= 0, 0);
  // Flux name: FOsignOldSign
  // Additional information: Output flux for signOldSign
  ROsignOldSign: $signOldSign => ; signOldSign;
end
