// SBML level 2 version 4

model MPModel()
  // Sirio
  // Description: Sirio model after Log gain calculation.
  // This model has been automatically generated by the MetaPlab SBML plugin.
  // The original model has time unit = 1.0 seconds and time resolution = 1.0
  // In order to obtain the same dynamics of the original model, the user should calculate it by means of the Euler algorithm with dT = 1.0 (which corresponds to 1.0 seconds)

  // Compartments:
  compartment skin = 1 volume; skin is "skin membrane";

  // Species:
  species $A in skin = 100;
  species $B in skin = 100;
  species $C in skin = 1;

  // Reactions:
  // Flux name: F2
  R2: $A => $B; 0;
  // Flux name: F4
  R4: $A => $C; 0;
  // Flux name: F1
  R1: $A => 2 $A; 0;
  // Flux name: F3
  R3: $B => ; 0;
  // Flux name: F5
  R5: $C => ; 0;
end
